entry_price := 9622.79
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mark_price := 9579.96
wallet_balance := 0.420481
contracts := -10000
leverage := 100
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taker_fee := 0.075%
funding_rate := 0.01%
maintenance_rate := 0.5%
sign := contracts/abs(contracts) = -1
entry_value := abs(contracts/entry_price) = 1.0392
mark_value := abs(contracts/mark_price) = 1.04385
upnl := sign*(entry_value - mark_value) = 4.64604*10^-3
entry_fee := entry_value*taker_fee = 0.7794*10^-3
position_margin := entry_value/leverage + entry_fee + upnl = 15.8174*10^-3
account_balance := wallet_balance - entry_fee = 0.419702
bankrupcy_value := account_balance + entry_value = 1.4589
maintenance_margin := maintenance_rate*entry_value = 0.005196
liquidation_fee := taker_fee*bankrupcy_value = 0.00109418
liquidation_price := contracts*entry_price/(entry_price*(account_balance - maintenance_margin - liquidation_fee) + contracts) = 15979.8
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9678
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9683
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9661.5
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avg2 := (5000*9681.48 + 1000*9661.5)/6000 = 9678.15
9663
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